*Heading
** Job name: Job-1 Model name: 1_EUC_alfa11
** Generated by: Abaqus/CAE 6.14-5
*Preprint, echo=NO, model=NO, history=NO, contact=NO
**
** PARTS
**
**Part, name=Plate
*Node
      1,          -6.,          -4.,           0.
      2,  -4.22222185,          -4.,           0.
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*Element, type=C3D8R
  1,  470,  471,  736,  735,  490,  491,  761,  760
  2,  471,  472,  737,  736,  491,  492,  762,  761
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**********************************************************************
*Elset, elset=Set-4, generate
 1,  648,    1
*Elset, elset=Set-5, generate
 649,  729,    1
*********************** Output for EUC Only**********************
*Elset, elset=Internal_EUC, generate
 649,  729,    1
*******************************************************************
*Orientation, name=Ori-1
1., 0., 0., 0., 1., 0.
3, 0.
** Section: Section-1
*Solid Section, elset=Set-4, orientation=Ori-1, material=MATERIAL-1
0.5,
** Section: Section-2
*Solid Section, elset=Set-5, orientation=Ori-1,  material=MATERIAL-2
0.5,
**End Part
**
**
** ASSEMBLY
**
**Assembly, name=Assembly
**
**Instance, name=EUC-1, part=EUC
**End Instance
*******Set to Results only in EUC without surrounding**************************************
**^*Elset, elset=EUC_Int, generate
**^  1,  1616,   1
***************************Boundary Constraint 4 Corner************************************
*Nset, nset=Set-8
    1,   26,  231,  256, 1289, 1314, 1519, 1544
*Nset, nset=Set_DOF3, generate
   1,  1568,     1
*************************************Temperature _Front************************************
*Nset, nset=Set-21
   620,  621,  622,  623,  624,  625
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 *************************************Temperature_Back************************************
*Nset, nset=Set-23
  595,  596,  597,  598,  599,  600
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******************************************************************************************
*Elset, elset=_m_Surf-5_New_S3, generate
 622,  648,    1
*Surface, type=ELEMENT, name=m_Surf-5_New
_m_Surf-5_New_S3, S3
*Elset, elset=_m_Surf-7_New_S4
 252, 261, 270, 279, 288, 297
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*Elset, elset=_m_Surf-7_New_S6, generate
   1,  190,   27
*Surface, type=ELEMENT, name=m_Surf-7_New
_m_Surf-7_New_S4, S4
_m_Surf-7_New_S6, S6
*Elset, elset=_m_Surf-9_New_S3,  generate
 623,  647,    1
*Surface, type=ELEMENT, name=m_Surf-9_New
_m_Surf-9_New_S3, S3
*Elset, elset=_s_Surf-5_New_S3,  generate
 217,  243,    1
*Surface, type=ELEMENT, name=s_Surf-5_New
_s_Surf-5_New_S3, S3
*Elset, elset=_s_Surf-7_New_S4
  27,  54,  81, 108, 135, 162
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*Elset, elset=_s_Surf-7_New_S6, generate
 406,  595,   27
*Surface, type=ELEMENT, name=s_Surf-7_New
_s_Surf-7_New_S4, S4
_s_Surf-7_New_S6, S6
*Elset, elset=_s_Surf-9_New_S3,  generate
 218,  242,    1
*Surface, type=ELEMENT, name=s_Surf-9_New
_s_Surf-9_New_S3, S3
** Constraint: LEFT-1-1
*Tie, name=LEFT-1-1, adjust=no, position tolerance=12.
s_Surf-9_New, m_Surf-9_New
** Constraint: TOP-1-1
*Tie, name=TOP-1-1, adjust=no, position tolerance=12.
s_Surf-7_New, m_Surf-7_New
**************************************************************************************************
*MPC, user, mode=node
11, 1172,1171,1170,1169,1128,1127,1126,1125
12, 665,666,667,668,621,622,623,624
13, 1152,1151,1150,1149,1103,1102,1101,1100
14, 645,646,647,648,596,597,598,599
21, 718,717,716,715,952,951,950,949
22, 625,626,627,628,877,878,879,880
23, 693,692,691,690,932,931,930,929
24, 600,601,602,603,857,858,859,860
31, 1214,1189,1124,1099,620,595,710,685
**End Assembly
**
** MATERIALS
**
*Material, name=MATERIAL-1
*Elastic
210., 0.3
*Expansion, type=ANISO
0.,0.,0.,1.,0.,0.
** End Assembly
**
**  MATERIALS
**
*Material, name=MATERIAL-2
*Elastic
210., 0.3
*Expansion, type=ANISO
0.,0.,0.,1.,0.,0.
** ----------------------------------------------------------------
**
** STEP: Step-1
**
*Step, name=Step-1, perturbation
*Static
**
** BOUNDARY CONDITIONS
**
** Name: BC-1 Type: Displacement/Rotation
*Boundary
Set-8, 1, 1
Set-8, 2, 2
**
** Name: BC_DOG3 Type: Displacement/Rotation
*Boundary
Set_DOF3, 3, 3
** PREDEFINED FIELDS
**
** Name: Field-1   Type: Temperature
*Temperature
Set-21, -1.
** Name: Field-2   Type: Temperature
*Temperature
Set-23, -1.
**
** OUTPUT REQUESTS
**
*Print, solve=NO
**
** FIELD OUTPUT: F-Output-1
**
*Output, field
*Element Output, elset=Internal_EUC, directions=YES
IVOL, S
**
** HISTORY OUTPUT: H-Output-1
**
*Output, history, variable=PRESELECT
*End Step
