*Heading
** Job name: Hahana_Mic_1_8_W_12El_MyEUC Model name: 3_EUC_Micro
** Generated by: Abaqus/CAE 6.14-5
*Preprint, echo=NO, model=NO, history=NO, contact=NO
**
** PARTS
**
*Part, name=Crack1_8_Angle_10
*End Part
**
*Part, name=Plate
*Node
      1,          -2.,          -2.,           0.
      2,          -2.,           2.,           0.
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*Element, type=C3D8R
   1,   198,  1801,  6975,  1383,     1,    25,   661,   100
   2,  1801,  1802,  6976,  6975,    25,    26,   662,   661
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*Nset, nset=Set-1
     1,     2,     3,     4,     5,     6
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*Elset, elset=Set-1, generate
  4801,  24264,      1
*Nset, nset=Set-2
     1,     2,     3,     4,     5,     6
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*Elset, elset=Set-2, generate
  4801,  24264,      1
*Nset, nset=Set-3
     1,     2,     3,     4,     5,     6
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*Elset, elset=Set-3, generate
    1,  4800,     1
** Section: Section-2-SET-5
*Orientation, name=Ori-1
    1.,           0.,           0.,           0.,           1.,           0.
3, 0.
*Solid Section, elset=Set-3, orientation=Ori-1, material=MATERIAL-2
0.5,
** Section: Section-1-SET-4
*Orientation, name=Ori-2
    1.,           0.,           0.,           0.,           1.,           0.
3, 0.
*Solid Section, elset=Set-2, orientation=Ori-2, material=MATERIAL-1
0.5
**
** my MPC
**
** MPC right side
*MPC, user, mode=node
11, 63,64,65,66,67,68,69,70,71,72
11, 73,74,75,76,77,78,79,80,81
11, 2010,2011,2012,2013,2014,2015,2016,2017,2018,2019
11, 2020,2021,2022,2023,2024,2025,2026,2027,2028
11, 2029,2030,2031,2032,2033,2034,2035,2036,2037,2038
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11, 149,150,151,152,153,154,155,156,157
**
** MPC left side
*MPC, user, mode=node
12, 25,26,27,28,29,30,31,32,33,34
12, 35,36,37,38,39,40,41,42,43
12, 1801,1802,1803,1804,1805,1806,1807,1808,1809,1810
12, 1811,1812,1813,1814,1815,1816,1817,1818,1819
12, 1820,1821,1822,1823,1824,1825,1826,1827,1828,1829
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12, 111,112,113,114,115,116,117,118,119
**
** MPC top side
*MPC, user, mode=node
13, 44,45,46,47,48,49,50,51,52,53
13, 54,55,56,57,58,59,60,61,62
13, 1592,1593,1594,1595,1596,1597,1598,1599,1600,1601
13, 1602,1603,1604,1605,1606,1607,1608,1609,1610
13, 1611,1612,1613,1614,1615,1616,1617,1618,1619,1620
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13, 130,131,132,133,134,135,136,137,138
**
** MPC bottom side
*MPC, user, mode=node
14, 82,83,84,85,86,87,88,89,90,91
14, 92,93,94,95,96,97,98,99,100
14, 1383,1384,1385,1386,1387,1388,1389,1390,1391,1392
14, 1393,1394,1395,1396,1397,1398,1399,1400,1401
14, 1402,1403,1404,1405,1406,1407,1408,1409,1410,1411
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14, 168,169,170,171,172,173,174,175,176
**
** MPC right bottom edge
*MPC, user, mode=node
21, 4,177,178,179,180,181,182,183,184,185
21, 186,187,7
**
** MPC right top edge
*MPC, user, mode=node
22, 3,209,208,207,206,205,204,203,202,201
22, 200,199,6
**
** MPC left top edge
*MPC, user, mode=node
23, 2,210,211,212,213,214,215,216,217,218
23, 219,220,5
**
** MPC left bottom edge
*MPC, user, mode=node
24, 1,198,197,196,195,194,193,192,191,190
24, 189,188,8
**
*End Part
**
**
** ASSEMBLY
**
*Assembly, name=Assembly
**
*Instance, name=Plate-1, part=Plate
*End Instance
**
*Instance, name=Crack1_8_Angle_10-1, part=Crack1_8_Angle_10
*End Instance
**
*Nset, nset=MY_EUC_new, instance=Plate-1
     1,     2,     3,     4,     5,     6
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*Elset, elset=MY_EUC_new, instance=Plate-1, generate
    1,  4800,     1
*Nset, nset=Set-29, instance=Plate-1
    5,    6,    7,    8,  101,  102
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*Elset, elset=Set-29, instance=Plate-1, generate
 4401,  4800,     1
*Nset, nset=Set-30, instance=Plate-1
    1,    2,    3,    4,   25,   26
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*Elset, elset=Set-30, instance=Plate-1, generate
   1,  400,    1
*Nset, nset=Set-31, instance=Plate-1
    1,    2,    3,    4,    5,    6
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*Elset, elset=Set-31, instance=Plate-1
     1,     2,     3,     4,     5,     6
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*Nset, nset=Set-32, instance=Plate-1
  9, 10, 11, 12, 21, 22, 23, 24
*Nset, nset=Set-33, instance=Plate-1
  9, 10, 11, 12, 21, 22, 23, 24
*Nset, nset=Set-48, instance=Plate-1
  9, 10, 11, 12, 21, 22, 23, 24
*Nset, nset=Set-49, instance=Plate-1
    1,    2,    3,    4,    5,    6
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*Elset, elset=Set-49, instance=Plate-1
     1,     2,     3,     4,     5,     6
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*Nset, nset=_PickedSet60, internal, instance=Plate-1, generate
     1,  26455,      1
*Elset, elset=_PickedSet60, internal, instance=Plate-1, generate
     1,  24264,      1
*Elset, elset=_m_Surf-7_S4, internal, instance=Plate-1
 5152, 5172, 5178, 5574, 5594, 5600
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*Elset, elset=_m_Surf-7_S3, internal, instance=Plate-1
 5162, 5176, 5187, 5584, 5598, 5609
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*Surface, type=ELEMENT, name=m_Surf-7
_m_Surf-7_S4, S4
_m_Surf-7_S3, S3
*Elset, elset=_m_Surf-9_S3, internal, instance=Plate-1
 5160, 5172, 5582, 5594, 6004, 6016
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*Elset, elset=_m_Surf-9_S6, internal, instance=Plate-1, generate
 5165,  9807,   422
*Elset, elset=_m_Surf-9_S4, internal, instance=Plate-1
 5175, 5192, 5597, 5614, 6019, 6036
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*Elset, elset=_m_Surf-9_S5, internal, instance=Plate-1, generate
 5188,  9830,   422
*Surface, type=ELEMENT, name=m_Surf-9
_m_Surf-9_S3, S3
_m_Surf-9_S6, S6
_m_Surf-9_S4, S4
_m_Surf-9_S5, S5
*Elset, elset=_s_Surf-7_S3, internal, instance=Plate-1
 5080, 5107, 5175, 5502, 5529, 5597
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*Elset, elset=_s_Surf-7_S4, internal, instance=Plate-1
 5157, 5174, 5579, 5596, 6001, 6018
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*Elset, elset=_s_Surf-7_S6, internal, instance=Plate-1, generate
 5168,  9810,   422
*Surface, type=ELEMENT, name=s_Surf-7
_s_Surf-7_S3, S3
_s_Surf-7_S4, S4
_s_Surf-7_S6, S6
*Elset, elset=_s_Surf-9_S3, internal, instance=Plate-1
 5106, 5163, 5174, 5528, 5585, 5596
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*Elset, elset=_s_Surf-9_S4, internal, instance=Plate-1
 5153, 5176, 5575, 5598, 5997, 6020
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*Elset, elset=_s_Surf-9_S5, internal, instance=Plate-1, generate
 5158,  9800,   422
*Surface, type=ELEMENT, name=s_Surf-9
_s_Surf-9_S3, S3
_s_Surf-9_S4, S4
_s_Surf-9_S5, S5
** Constraint: LEFT-1-1-1-1
*Tie, name=LEFT-1-1-1-1, adjust=no, position tolerance=12.
s_Surf-7, m_Surf-7
** Constraint: TOP-1-1-1-1
*Tie, name=TOP-1-1-1-1, adjust=no, position tolerance=12.
s_Surf-9, m_Surf-9
*Enrichment, name=Crack-2, type=STATIONARY CRACK, elset=_PickedSet60
*End Assembly
**
** MATERIALS
**
**  End Assembly
**
**   MATERIALS
**
*Material, name=MATERIAL-1
*Damage Initiation, criterion=MAXPS
120.,
*Damage Evolution, type=DISPLACEMENT
 0.2,
*Elastic
210., 0.3
**    MATERIALS
**
*Material, name=MATERIAL-2
*Damage Initiation, criterion=MAXPS
120.,
*Damage Evolution, type=DISPLACEMENT
 0.2,
*Elastic
210., 0.3
*Expansion, type=ANISO
1.,0.,0.,0.,0.,0.
*Initial Conditions, type=ENRICHMENT
Plate-1.110, 1,Crack-2, 0.0239278, 0.119903
Plate-1.110, 2,Crack-2, -0.176072, 0.0852218
Plate-1.110, 3,Crack-2, -0.140858, -0.111748
Plate-1.110, 4,Crack-2, 0.0591422, -0.0770673
Plate-1.110, 5,Crack-2, 0.0239278, 0.119903
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Plate-1.4591, 8,Crack-2, 1e-06
** ----------------------------------------------------------------
**
** STEP: Step-1
**
*Step, name=Step-1, nlgeom=NO
*Static, stabilize=0.0002, allsdtol=0.05, continue=NO
0.01, 1., 1e-09, 1.
**
** BOUNDARY CONDITIONS
**
** Name: BC-4 Type: Displacement/Rotation
*Boundary
Set-49, 3, 3
Set-49, 4, 4
Set-49, 5, 5
** Name: Disp-BC-3 Type: Displacement/Rotation
*Boundary
Set-48, 3, 3
Set-48, 4, 4
Set-48, 5, 5
**
** PREDEFINED FIELDS
**
** Name: Field-1   Type: Temperature
*Temperature
Plate-1.Set-3, -1.
**
** OUTPUT REQUESTS
**
*Restart, write, frequency=0
*Print, solve=NO
**
** FIELD OUTPUT: F-Output-1
**
*Output, field
*Node Output
CF, PHILSM, PSILSM, RF, U
**
** FIELD OUTPUT: F-Output-2
**
*Element Output, elset=MY_EUC_new, directions=YES
**@*Element Output, directions=YES
E, IVOL, LE, S
*Output, history, frequency=0
**
** HISTORY OUTPUT: Crack-1
**
*Contour Integral, crack name=Crack-2, contours=5, type=K FACTORS, direction=KII0, xfem
**
** HISTORY OUTPUT: H-Output-2
**
*Contour Integral, crack name=Crack-2, contours=5, xfem
*End Step
