*Heading
** Job name: Hahana_Macro Model name: Macro
** Generated by: Abaqus/CAE 6.14-5
*Preprint, echo=NO, model=NO, history=NO, contact=NO
**
** PARTS
**
*Part, name=Plate
*Node
      1,          28.,          58.,           0.
      2,          28.,          62.,           0.
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*Element, type=C3D8R
1, 8, 5, 6, 7, 1, 2, 3, 4
  2,  319,  329,   60,   59,  689,  699,  180,  181
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*Nset, nset=Set-11, generate
 1,  8,  1
*Elset, elset=Set-11
 1,
*Nset, nset=Set-12, generate
    1,  1056,     1
*Elset, elset=Set-12, generate
   2,  480,    1
** Section: Section-2-SET-2
*Solid Section, elset=Set-11, material=MATERIAL-2
,
*hourglass stiffness
1
** Section: Section-1-SET-1
*Solid Section, elset=Set-12, material=MATERIAL-1
,
*End Part
**
**
** ASSEMBLY
**
*Assembly, name=Assembly
**
*Instance, name=Plate-1, part=Plate
*End Instance
**
*Nset, nset=Set-10, instance=Plate-1, generate
    1,  1056,     1
*Elset, elset=Set-10, instance=Plate-1, generate
   1,  480,    1
*Elset, elset=_Surf-9_S3, internal, instance=Plate-1, generate
 418,  432,    1
*Surface, type=ELEMENT, name=Surf-9
_Surf-9_S3, S3
*Elset, elset=_Surf-10_S4, internal, instance=Plate-1, generate
  14,  196,   13
*Surface, type=ELEMENT, name=Surf-10
_Surf-10_S4, S4
*End Assembly
**
** MATERIALS
**
**  ELEMENT CONTROLS
**
**  MATERIALS
**
*Material, name=MATERIAL-1
*Damage Initiation, criterion=MAXPS
60.,
*Damage Evolution, type=DISPLACEMENT
 0.2,
*Elastic
210., 0.3
*Material, name=MATERIAL-2
*User Material, constants=3
600.,300.,100.
** ----------------------------------------------------------------
**
** STEP: Step-1
**
*Step, name=Step-1, nlgeom=NO
*Static, stabilize=0.0002, allsdtol=0.05, continue=NO
0.01, 1., 1e-09, 1.
**
** BOUNDARY CONDITIONS
**
** Name: Disp-BC-1 Type: Displacement/Rotation
*Boundary
Set-10, 3, 3
Set-10, 4, 4
Set-10, 5, 5
**
** LOADS
**
** Name: SURFFORCE-1   Type: Pressure
*Dsload
Surf-9, P, -10.
** Name: SURFFORCE-2   Type: Pressure
*Dsload
Surf-10, P, -10.
**
** OUTPUT REQUESTS
**
*Restart, write, frequency=0
**
** FIELD OUTPUT: F-Output-1
**
*Output, field
*Node Output
CF, RF, U
**
** FIELD OUTPUT: F-Output-2
**
*Element Output, directions=YES
E, IVOL, LE, PE, S, PEEQ
**
** HISTORY OUTPUT: H-Output-1
**
*Output, history, variable=PRESELECT
*End Step
